New "Monitor.battery3_states" element=Storage.battery3 mode=3
New "Monitor.battery6_states" element=Storage.battery6 mode=3
New "Monitor.battery8_states" element=Storage.battery8 mode=3
New "Monitor.battery11_states" element=Storage.battery11 mode=3
New "Monitor.battery13_states" element=Storage.battery13 mode=3
New "Monitor.battery18_states" element=Storage.battery18 mode=3
New "Monitor.battery21_states" element=Storage.battery21 mode=3
New "Monitor.battery24_states" element=Storage.battery24 mode=3
New "Monitor.battery30_states" element=Storage.battery30 mode=3
New "Monitor.battery32_states" element=Storage.battery32 mode=3
New "Monitor.battery34_states" element=Storage.battery34 mode=3
New "Monitor.battery36_states" element=Storage.battery36 mode=3
New "Monitor.battery39_states" element=Storage.battery39 mode=3
New "Monitor.battery41_states" element=Storage.battery41 mode=3
New "Monitor.battery44_states" element=Storage.battery44 mode=3
New "Monitor.battery47_states" element=Storage.battery47 mode=3
New "Monitor.battery49_states" element=Storage.battery49 mode=3
New "Monitor.battery51_states" element=Storage.battery51 mode=3
New "Monitor.battery53_states" element=Storage.battery53 mode=3
New "Monitor.battery55_states" element=Storage.battery55 mode=3
New "Monitor.battery58_states" element=Storage.battery58 mode=3
New "Monitor.battery61_states" element=Storage.battery61 mode=3
New "Monitor.battery64_states" element=Storage.battery64 mode=3
New "Monitor.battery66_states" element=Storage.battery66 mode=3
New "Monitor.battery68_states" element=Storage.battery68 mode=3
New "Monitor.battery71_states" element=Storage.battery71 mode=3
New "Monitor.battery73_states" element=Storage.battery73 mode=3
New "Monitor.battery76_states" element=Storage.battery76 mode=3
New "Monitor.battery78_states" element=Storage.battery78 mode=3
New "Monitor.battery81_states" element=Storage.battery81 mode=3
New "Monitor.battery84_states" element=Storage.battery84 mode=3
New "Monitor.battery86_states" element=Storage.battery86 mode=3
New "Monitor.battery88_states" element=Storage.battery88 mode=3
New "Monitor.battery90_states" element=Storage.battery90 mode=3
New "Monitor.battery94_states" element=Storage.battery94 mode=3
New "Monitor.battery97_states" element=Storage.battery97 mode=3
New "Monitor.battery100_states" element=Storage.battery100 mode=3
New "Monitor.battery102_states" element=Storage.battery102 mode=3
New "Monitor.battery105_states" element=Storage.battery105 mode=3
New "Monitor.battery108_states" element=Storage.battery108 mode=3
New "Monitor.battery111_states" element=Storage.battery111 mode=3
New "Monitor.battery114_states" element=Storage.battery114 mode=3
New "Monitor.battery116_states" element=Storage.battery116 mode=3
