! Set DataPath address to the folder containing the Master.dss (Master-OpenDSS.dss) file.
Set DataPath = "C:\Users\aryan\Documents\documents_general\MultiPeriod-DistOPF-Benchmark\functions\OneTimeScripts\validationAgainstOpenDSS_MATLAB\ieee123_1ph_created\"

! Clears ckt, Defines ckt, Defines Lines, Loads, Voltage Base, Load Mult
redirect "components/IEEE123SinglePh.dss"

! Defines Static Capacitors
redirect "components/Capacitor.dss"

! Defines Regulators
redirect "components/Regulator.dss"

! Defines Regulator Controls
redirect "components/RegulatorControl.dss"

New LoadShape.loads_loadshape interval=0 npts=24 csvfile="data\LoadShape1.csv"
BatchEdit Load..* daily=loads_loadshape

! Choose a PV % Penetration Configuration.
! Use PV10/PV30/PV50/PV100 or nothing
 redirect "components/PVconfigs/PV10.dss"
! redirect "components/PVconfigs/PV30.dss"
! redirect "components/PVconfigs/PV50.dss"
! redirect "components/PVconfigs/PV100.dss"
! redirect "components/PVconfigs/PV100_reactive.dss"

! 10% of the Load Buses have Batteries with specifications based on corresponding PV systems

New Storage.Battery9 phases=1 bus1=9 kv=2.4018 kWrated=16 kWhrated=64 %stored=62.5 %reserve=30 vminpu=0.95 vmaxpu=1.05
New Storage.Battery28 phases=1 bus1=28 kv=2.4018 kWrated=16 kWhrated=64 %stored=62.5 %reserve=30 vminpu=0.95 vmaxpu=1.05
New Storage.Battery48 phases=1 bus1=48 kv=2.4018 kWrated=84 kWhrated=336 %stored=62.5 %reserve=30 vminpu=0.95 vmaxpu=1.05
New Storage.Battery58 phases=1 bus1=58 kv=2.4018 kWrated=8 kWhrated=32 %stored=62.5 %reserve=30 vminpu=0.95 vmaxpu=1.05
New Storage.Battery65 phases=1 bus1=65 kv=2.4018 kWrated=56 kWhrated=224 %stored=62.5 %reserve=30 vminpu=0.95 vmaxpu=1.05
New Storage.Battery76 phases=1 bus1=76 kv=2.4018 kWrated=98 kWhrated=392 %stored=62.5 %reserve=30 vminpu=0.95 vmaxpu=1.05
New Storage.Battery87 phases=1 bus1=87 kv=2.4018 kWrated=16 kWhrated=64 %stored=62.5 %reserve=30 vminpu=0.95 vmaxpu=1.05
New Storage.Battery100 phases=1 bus1=100 kv=2.4018 kWrated=16 kWhrated=64 %stored=62.5 %reserve=30 vminpu=0.95 vmaxpu=1.05

! Define a common load shape pattern for all storage controllers
New LoadShape.SC_common_loadshape interval=1 npts=24 mult=[0, 0, -0.3, -0.45, -0.5, -0.45, -0.3, 0, 0, 0, 0, 0, 0, 0, 0, 0.3, 0.5, 0.8, 0.9, 0.8, 0.5, 0.3, 0, 0]

! Storage Controllers for each battery with specific element and element list

New StorageController.SC9 Element=Line.l1 ElementList=[Battery9] mode=loadshape
~ daily=SC_common_loadshape
~ eventlog=yes

New StorageController.SC28 Element=Line.l1 ElementList=[Battery28] mode=loadshape
~ daily=SC_common_loadshape
~ eventlog=yes

New StorageController.SC48 Element=Line.l1 ElementList=[Battery48] mode=loadshape
~ daily=SC_common_loadshape
~ eventlog=yes

New StorageController.SC58 Element=Line.l1 ElementList=[Battery58] mode=loadshape
~ daily=SC_common_loadshape
~ eventlog=yes

New StorageController.SC65 Element=Line.l1 ElementList=[Battery65] mode=loadshape
~ daily=SC_common_loadshape
~ eventlog=yes

New StorageController.SC76 Element=Line.l1 ElementList=[Battery76] mode=loadshape
~ daily=SC_common_loadshape
~ eventlog=yes

New StorageController.SC87 Element=Line.l1 ElementList=[Battery87] mode=loadshape
~ daily=SC_common_loadshape
~ eventlog=yes

New StorageController.SC100 Element=Line.l1 ElementList=[Battery100] mode=loadshape
~ daily=SC_common_loadshape
~ eventlog=yes


! Disable all automatic control actions by OpenDSS
Set controlmode=OFF

MakeBusList

Set mode=Daily
Set stepsize=1h
Set number=24

Calcv
Solve
