New Monitor.V9 element=Load.s9 mode=112 // mode 112 takes only single phase magnitude of voltage and current for a load
New Monitor.V28 element=Load.s28 mode=112
New Monitor.V48 element=Load.s48 mode=112
New Monitor.V58 element=Load.s58 mode=112
New Monitor.V65 element=Load.s65 mode=112
New Monitor.V76 element=Load.s76 mode=112
New Monitor.V87 element=Load.s87 mode=112
New Monitor.V100 element=Load.s100 mode=112
